// COMSOL Multiphysics 6.1.0.346 model "Orthotropic_model.mph"
// Outline of the model tree

Parameters
  Ex = 13.9e9  // Ex
  Ey = 5e9  // Ey
  vxy = 0.1  // vxy
  Gxy = 2e9  // Shear modulus
  R = 1.65 [mm]  // Radius
  theta = 7*pi/12  // Angle
  L = 17 [mm]  // Length

Pairs
  ap1: Identity "Identity Boundary Pair 1a" | source: boundaries 5, 6, 9, 12; destination: boundaries 13-16

Coordinate systems
  sys2: Rotated "Rotated System 2" | inPlaneAngle = theta

Geometry
  geom1 "Geometry 1" (2D, length unit mm)
    r1: Rectangle | base = center; size = {10, L}
    c1: Circle | r = R
    dif1: Difference | input = r1; input2 = c1
    c2: Circle | type = curve; r = R+1.5
    pard1: PartitionDomains
      domain = dif1(1) domains 1
      partitionwith = objects
      edge = c2(1) boundaries 1-4
      object = c2
    fin: Finalize "Form Assembly" | action = assembly

Physics
  solid: SolidMechanics on all domains
    dependent variable u = {u, v, w}
    Type2D.Type2D = PlaneStress
    d.d = 1e-3
    lemm1: LinearElasticModel "Linear Elastic Material 1" (default)
      SolidModel = Orthotropic
      Evector_mat = userdef
      Evector = {Ex, Ey, 1e9}
      nuvector_mat = userdef
      nuvector = {vxy, 0.1, 0.1}
      Gvector_mat = userdef
      Gvector = {Gxy, 1e9, 1e9}
      Evect_mat = userdef
      Evect = {0, 0}
      nuvect_mat = userdef
      nuvect = {0, 0}
      Gvect1_mat = userdef
      Gvect1 = 0
      rho_mat = userdef
      rho = 610
      coordinateSystem = sys2
    free1: Free (default)
    init1: init "Initial Values 1" (default)
    dcont1: Continuity (default)
    fix1: Fixed "Fixed Constraint 1" on boundaries 2
    disp1: Displacement1 "Prescribed Displacement 1" on boundaries 3 | Direction = {1, 0, 0}; U0 = {0, L/100, 0}
    bndl1: BoundaryLoad on boundaries 3 | LoadType = TotalForce; Ftot = {0, 950, 0}; FperArea = {0, 950, 0}

Mesh
  mesh1 "Mesh 1"
    size: MeshSizeDefault | hauto = 2
    bl1: BndLayer "Boundary Layers 1" on entire geometry
    ftri1: FreeTri "Free Triangular 1" on remaining entities

Studies
  std1 "Study 1"
    stat: Stationary

Solver configurations
  sol1 "Solution 1" (study std1)
    v1: Variables "Dependent Variables 1"
    s1: Stationary "Stationary Solver 1"
      dDef: Direct
      fc1: FullyCoupled | linsolver = dDef

Datasets
  dset1: Solution | solution = sol1

Derived values
  int1: IntLine "Line Integration 1" on boundaries 3
    data = dset1
    table = tbl1
    expr = solid.RFy
    unit = N
    descr = Reaction force, y-component

Tables
  tbl1: Table
    // Line Integration 1
    Reaction force, y-component (N) | Reaction force, y-component (N) | Reaction force, y-component (N)
    94.0879 | 94.0879 | 949.996

Plots
  pg4: PlotGroup2D "2D Plot Group 4" | data = dset1
    surf1: Surface "exx" | expr = solid.eXX
  pg5: PlotGroup2D "2D Plot Group 5" | data = dset1
    surf1: Surface "eyy" | expr = solid.eYY
  pg6: PlotGroup2D "2D Plot Group 6" | data = dset1
    surf1: Surface "exy" | expr = solid.elogxy

Exports
  data1: Data
    data = dset1
    expr = {solid.elogxx, solid.elogxy, solid.elogyy}
    unit = {1, 1, 1}
    descr = {"Logarithmic strain tensor, xx-component", "Logarithmic strain tensor, xy-component", "Logarithmic strain tensor, yy-component"}
    filename = /Users/binchen/Desktop/FEMU Open/Virtual_image_generate/FEA_results/Strain.csv
    separator = ,
  data2: Data
    data = dset1
    expr = {u, v}
    unit = {mm, mm}
    descr = {"Displacement field, X-component", "Displacement field, Y-component"}
    filename = /Users/binchen/Desktop/FEMU Open/Virtual_image_generate/FEA_results/Disp.csv
    separator = ,